# k (ganho DC) → o valor final que a saída estaciona, dividido pela amplitude do degrau de entrada.
k := 326/500 = 0.652
# ζ (zeta, amortecimento) → tirado do sobre-sinal (quanto a resposta ultrapassa o valor final). Quanto maior o overshoot, menor o ζ.
Mp := (578 - 327)/327 = 0.767584
ζ := -ln(Mp)/sqrt(π^2 + ln(Mp)^2) = 0.0838984
# G =
#
# 0.003436 z + 0.003416
# ----------------------
# z^2 - 1.972 z + 0.9829
t := 0.01
n := 61
ω := 2*π/(n*t) = 10.3003
G_(s) := ω^2*k/(s^2 + (2*ζ*ω)*s + ω^2)
G_2(z) := (0.003436*z + 0.003416)/(z^2 - 1.97*z + 0.9829)
N := 500
k := 2 .. N
x[0] := 0
x[1] := 0
x[k] := 1.972*x[k - 1] - 0.9829*x[k - 2] + 0.003436 + 0.003416
j := 0 .. N
T[j] := j*t
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media := 0.837
pico := 1.1
(pico - media)/media*100 = 31.4217
